# Alexius S. Academia
#
# Generalized Hooke's Law:
# (Solve for stresses)
# Expanded form:
# 1)
ε_x == 1/E*(σ_x - v(σ_y + σ_z))
E*ε_x == σ_x - v*σ_y - v*σ_z
# 2)
ε_y == 1/E*(σ_y - v(σ_z + σ_x))
E*ε_y == σ_y - v*σ_z - v*σ_x
# 3)
ε_z == 1/E*(σ_z - v(σ_x + σ_y))
E*ε_z == σ_x - v*σ_x - v*σ_y
# In matrix form:
[1, -v, -v; -v, 1, -v; -v, -v, 1]*[σ_x; σ_y; σ_z] == E*[ε_x; ε_y; ε_z]
# Rearranging the equation:
[σ_x; σ_y; σ_z] == [1, -v, -v; -v, 1, -v; -v, -v, 1]^-1*[ε_x; ε_y; ε_z]
[1, -v, -v; -v, 1, -v; -v, -v, 1]^-1*[E*ε_x; E*ε_y; E*ε_z] → [
    E*ε_x*(v - 1)/(2*v^2 + v - 1) - E*v*ε_y/(2*v^2 + v - 1) - E*v*ε_z/(2*v^2 + v - 1);
    E*ε_y*(v - 1)/(2*v^2 + v - 1) - E*v*ε_x/(2*v^2 + v - 1) - E*v*ε_z/(2*v^2 + v - 1);
    E*ε_z*(v - 1)/(2*v^2 + v - 1) - E*v*ε_x/(2*v^2 + v - 1) - E*v*ε_y/(2*v^2 + v - 1)
]
# Substitute the condition:
ε_z := 0
[1, -v; -v, 1]^-1*[E*ε_x; E*ε_y] → [-E*ε_x/(v^2 - 1) - E*v*ε_y/(v^2 - 1); -E*ε_y/(v^2 - 1) - E*v*ε_x/(v^2 - 1)]
# Interpreting the result:
σ_x == -E*(ε_x + v*ε_y)/(v^2 - 1) == E/(1 - v^2)*(ε_x + vε_y)
σ_y == -E*(ε_y + v*ε_x)/(v^2 - 1) == E/(1 - v^2)*(ε_y + vε_x)
